#system set

units		real
boundary	p p p
atom_style	angle
bond_style      harmonic
angle_style   harmonic
neigh_modify delay 0 every 1
pair_style lj/cut 20

read_data	cg_pe.data

#minimize

#minimize 0.0 1.0e-8 1000 100000


#write_data	2.data
